<neuroml xmlns="http://www.neuroml.org/schema/neuroml2"  xmlns:xs="http://www.w3.org/2001/XMLSchema" xmlns:xsi="http://www.w3.org/2001/XMLSchema-instance" xsi:schemaLocation="http://www.neuroml.org/schema/neuroml2 https://raw.github.com/NeuroML/NeuroML2/development/Schemas/NeuroML2/NeuroML_v2beta5.xsd" id="TestL23">
    <notes>

This NeuroML 2 file was generated by OpenCortex v0.1.1 using:
    libNeuroML v0.2.32
    pyNeuroML v0.3.0

    </notes>
    <property tag="Network seed" value="134344"/>
    <include href="TestL23/SupLTSInter.cell.nml"></include>
    <include href="TestL23/ar__m00_25.channel.nml"></include>
    <include href="TestL23/cad__beta0_02__phi260000.nml"></include>
    <include href="TestL23/cad__beta0_05__phi520000.nml"></include>
    <include href="TestL23/cal.channel.nml"></include>
    <include href="TestL23/cat_a.channel.nml"></include>
    <include href="TestL23/k2.channel.nml"></include>
    <include href="TestL23/ka.channel.nml"></include>
    <include href="TestL23/kahp_slower.channel.nml"></include>
    <include href="TestL23/kc_fast.channel.nml"></include>
    <include href="TestL23/kdr_fs.channel.nml"></include>
    <include href="TestL23/km.channel.nml"></include>
    <include href="TestL23/naf2__a0__b0__c0__d0__fastNa_shiftmin2_5.channel.nml"></include>
    <include href="TestL23/nap.channel.nml"></include>
    <include href="TestL23/pas.channel.nml"></include>
    <include href="TestL23/SupAxAx.cell.nml"></include>
    <include href="TestL23/cat.channel.nml"></include>
    <include href="TestL23/SupBasket.cell.nml"></include>
    <include href="TestL23/L23PyrRS.cell.nml"></include>
    <include href="TestL23/cad__beta0_01__phi26000.nml"></include>
    <include href="TestL23/cad__beta0_05__phi52000.nml"></include>
    <include href="TestL23/kahp.channel.nml"></include>
    <include href="TestL23/kc.channel.nml"></include>
    <include href="TestL23/kdr.channel.nml"></include>
    <include href="TestL23/naf__a0__b0__c0__d0__fastNa_shiftmin3_5.channel.nml"></include>
    <include href="TestL23/Syn_AMPA_SupPyr_SupFS.synapse.nml"></include>
    <include href="TestL23/Syn_AMPA_SupPyr_SupLTS.synapse.nml"></include>
    <include href="TestL23/Syn_AMPA_SupPyr_SupPyr.synapse.nml"></include>
    <include href="TestL23/Syn_GABAA_SupAxAx_SupPyr.synapse.nml"></include>
    <include href="TestL23/Syn_GABAA_SupBask_SupAxAx.synapse.nml"></include>
    <include href="TestL23/Syn_GABAA_SupBask_SupBask.synapse.nml"></include>
    <include href="TestL23/Syn_GABAA_SupBask_SupLTS.synapse.nml"></include>
    <include href="TestL23/Syn_GABAA_SupBask_SupPyr.synapse.nml"></include>
    <include href="TestL23/Syn_GABAA_SupLTS_FS.synapse.nml"></include>
    <include href="TestL23/Syn_GABAA_SupLTS_LTS.synapse.nml"></include>
    <include href="TestL23/Syn_GABAA_SupLTS_SupPyr.synapse.nml"></include>
    <include href="TestL23/Syn_NMDA_RSPyr_SupFS.synapse.nml"></include>
    <include href="TestL23/Syn_NMDA_RSPyr_SupLTS.synapse.nml"></include>
    <include href="TestL23/Syn_NMDA_SupPyr_SupPyr.synapse.nml"></include>
    <include href="TestL23/SynForEctStim.synapse.nml"></include>
    <pulseGenerator id="DepCurr_L23RS_TO_CG3D_L23PyrRS_Pulse0_Cell17" delay="0.000000 ms" duration="20000.000000 ms" amplitude="0.000073 uA"/>
    <pulseGenerator id="DepCurr_L23RS_TO_CG3D_L23PyrRS_Pulse0_Cell15" delay="0.000000 ms" duration="20000.000000 ms" amplitude="0.000056 uA"/>
    <pulseGenerator id="DepCurr_L23RS_TO_CG3D_L23PyrRS_Pulse0_Cell7" delay="0.000000 ms" duration="20000.000000 ms" amplitude="0.000080 uA"/>
    <pulseGenerator id="DepCurr_L23RS_TO_CG3D_L23PyrRS_Pulse0_Cell8" delay="0.000000 ms" duration="20000.000000 ms" amplitude="0.000079 uA"/>
    <pulseGenerator id="DepCurr_L23RS_TO_CG3D_L23PyrRS_Pulse0_Cell14" delay="0.000000 ms" duration="20000.000000 ms" amplitude="0.000052 uA"/>
    <pulseGenerator id="DepCurr_L23RS_TO_CG3D_L23PyrRS_Pulse0_Cell4" delay="0.000000 ms" duration="20000.000000 ms" amplitude="0.000055 uA"/>
    <pulseGenerator id="DepCurr_L23RS_TO_CG3D_L23PyrRS_Pulse0_Cell0" delay="0.000000 ms" duration="20000.000000 ms" amplitude="0.000070 uA"/>
    <pulseGenerator id="DepCurr_L23RS_TO_CG3D_L23PyrRS_Pulse0_Cell1" delay="0.000000 ms" duration="20000.000000 ms" amplitude="0.000093 uA"/>
    <pulseGenerator id="DepCurr_L23RS_TO_CG3D_L23PyrRS_Pulse0_Cell13" delay="0.000000 ms" duration="20000.000000 ms" amplitude="0.000084 uA"/>
    <pulseGenerator id="DepCurr_L23RS_TO_CG3D_L23PyrRS_Pulse0_Cell19" delay="0.000000 ms" duration="20000.000000 ms" amplitude="0.000051 uA"/>
    <pulseGenerator id="DepCurr_L23RS_TO_CG3D_L23PyrRS_Pulse0_Cell12" delay="0.000000 ms" duration="20000.000000 ms" amplitude="0.000067 uA"/>
    <pulseGenerator id="DepCurr_L23RS_TO_CG3D_L23PyrRS_Pulse0_Cell3" delay="0.000000 ms" duration="20000.000000 ms" amplitude="0.000068 uA"/>
    <pulseGenerator id="DepCurr_L23RS_TO_CG3D_L23PyrRS_Pulse0_Cell16" delay="0.000000 ms" duration="20000.000000 ms" amplitude="0.000093 uA"/>
    <pulseGenerator id="DepCurr_L23RS_TO_CG3D_L23PyrRS_Pulse0_Cell5" delay="0.000000 ms" duration="20000.000000 ms" amplitude="0.000053 uA"/>
    <pulseGenerator id="DepCurr_L23RS_TO_CG3D_L23PyrRS_Pulse0_Cell9" delay="0.000000 ms" duration="20000.000000 ms" amplitude="0.000085 uA"/>
    <pulseGenerator id="DepCurr_L23RS_TO_CG3D_L23PyrRS_Pulse0_Cell11" delay="0.000000 ms" duration="20000.000000 ms" amplitude="0.000083 uA"/>
    <pulseGenerator id="DepCurr_L23RS_TO_CG3D_L23PyrRS_Pulse0_Cell6" delay="0.000000 ms" duration="20000.000000 ms" amplitude="0.000099 uA"/>
    <pulseGenerator id="DepCurr_L23RS_TO_CG3D_L23PyrRS_Pulse0_Cell10" delay="0.000000 ms" duration="20000.000000 ms" amplitude="0.000051 uA"/>
    <pulseGenerator id="DepCurr_L23RS_TO_CG3D_L23PyrRS_Pulse0_Cell18" delay="0.000000 ms" duration="20000.000000 ms" amplitude="0.000091 uA"/>
    <pulseGenerator id="DepCurr_L23RS_TO_CG3D_L23PyrRS_Pulse0_Cell2" delay="0.000000 ms" duration="20000.000000 ms" amplitude="0.000088 uA"/>
    <poissonFiringSynapse id="BackgroundL23RS_TO_CG3D_L23PyrRS_PoiSyn0" averageRate="100.000000 Hz" synapse="Syn_AMPA_SupPyr_SupPyr" spikeTarget="./Syn_AMPA_SupPyr_SupPyr"/>
    <poissonFiringSynapse id="EctopicStimL23RS_TO_CG3D_L23PyrRS_PoiSyn0" averageRate="0.100000 Hz" synapse="SynForEctStim" spikeTarget="./SynForEctStim"/>
    <network id="TestL23" type="networkWithTemperature" temperature="32degC">
        <population id="CG3D_L23PyrRS" component="L23PyrRS" size="20" type="populationList">
            <instance id="0">
                <location x="-158.841310297000007" y="-430.118999579999979" z="10.9331207863"/>
            </instance>
            <instance id="1">
                <location x="141.792475313000011" y="-291.860215211000025" z="151.145387168000013"/>
            </instance>
            <instance id="2">
                <location x="-97.095312510799999" y="-478.58514186299999" z="201.078817444999999"/>
            </instance>
            <instance id="3">
                <location x="-143.090450519000001" y="-348.643492587000026" z="-9.63519612084"/>
            </instance>
            <instance id="4">
                <location x="61.440847859400002" y="-184.8606336" z="135.961968380000002"/>
            </instance>
            <instance id="5">
                <location x="-16.360709678500001" y="-297.179410757000028" z="68.076998188100006"/>
            </instance>
            <instance id="6">
                <location x="162.030723585999993" y="-241.849860095999986" z="16.7264562748"/>
            </instance>
            <instance id="7">
                <location x="38.544948929" y="-318.042282290999992" z="180.780087866000002"/>
            </instance>
            <instance id="8">
                <location x="153.102393696999997" y="-390.971665221000023" z="-136.505549086999991"/>
            </instance>
            <instance id="9">
                <location x="-79.770593936599994" y="-206.511810927999989" z="-228.659888058000007"/>
            </instance>
            <instance id="10">
                <location x="117.369245014000001" y="-140.674613141999998" z="-26.669326248099999"/>
            </instance>
            <instance id="11">
                <location x="135.939205221000009" y="-205.774491216999991" z="-41.391158938700002"/>
            </instance>
            <instance id="12">
                <location x="-69.673970340300002" y="-474.283611356999984" z="-108.914323581999994"/>
            </instance>
            <instance id="13">
                <location x="82.642052868899995" y="-316.514315335999981" z="-61.751059725300003"/>
            </instance>
            <instance id="14">
                <location x="121.831003608000003" y="-164.887776518999999" z="-54.942374477800001"/>
            </instance>
            <instance id="15">
                <location x="83.1578171811" y="-168.771043942000006" z="-144.000044236000008"/>
            </instance>
            <instance id="16">
                <location x="16.537236630300001" y="-105.819840808999999" z="247.222239338999998"/>
            </instance>
            <instance id="17">
                <location x="80.602885311500003" y="-236.991443755000006" z="-202.421203668000004"/>
            </instance>
            <instance id="18">
                <location x="174.863527169000008" y="-87.959801836300002" z="-77.199821601500005"/>
            </instance>
            <instance id="19">
                <location x="-3.7172103294" y="-263.769193340000015" z="-59.610652127900003"/>
            </instance>
        </population>
        <population id="CG3D_SupAxAx" component="SupAxAx" size="2" type="populationList">
            <instance id="0">
                <location x="212.071541481999986" y="-55.430577769599999" z="-102.903240093999997"/>
            </instance>
            <instance id="1">
                <location x="61.462667360600001" y="-19.568540729999999" z="-157.179145785999992"/>
            </instance>
        </population>
        <population id="CG3D_SupLTS" component="SupLTSInter" size="2" type="populationList">
            <instance id="0">
                <location x="-152.294429218999994" y="-278.628985742999987" z="175.458335866999988"/>
            </instance>
            <instance id="1">
                <location x="-174.691365588999986" y="-0.173876531608" z="94.318543964100002"/>
            </instance>
        </population>
        <population id="CG3D_SupBask" component="SupBasket" size="2" type="populationList">
            <instance id="0">
                <location x="-224.839656622000007" y="-71.361645902600003" z="-68.540205333900005"/>
            </instance>
            <instance id="1">
                <location x="-151.829518745000001" y="-297.645161056000006" z="176.600579127999993"/>
            </instance>
        </population>
        <projection id="Proj0syn0_CG3D_L23PyrRS_CG3D_L23PyrRS" presynapticPopulation="CG3D_L23PyrRS" postsynapticPopulation="CG3D_L23PyrRS" synapse="Syn_AMPA_SupPyr_SupPyr">
            <connectionWD id="0" preCellId="../CG3D_L23PyrRS/14/L23PyrRS" preSegmentId="142" preFractionAlong="0.49828234594" postCellId="../CG3D_L23PyrRS/0/L23PyrRS" postSegmentId="73" postFractionAlong="0.421705807533" weight="1." delay="0.05 ms"/>
            <connectionWD id="1" preCellId="../CG3D_L23PyrRS/3/L23PyrRS" preSegmentId="147" preFractionAlong="0.139209976059" postCellId="../CG3D_L23PyrRS/0/L23PyrRS" postSegmentId="52" postFractionAlong="0.202847557145" weight="1." delay="0.05 ms"/>
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        </projection>
        <projection id="Proj0syn1_CG3D_L23PyrRS_CG3D_L23PyrRS" presynapticPopulation="CG3D_L23PyrRS" postsynapticPopulation="CG3D_L23PyrRS" synapse="Syn_NMDA_SupPyr_SupPyr">
            <connectionWD id="0" preCellId="../CG3D_L23PyrRS/14/L23PyrRS" preSegmentId="142" preFractionAlong="0.49828234594" postCellId="../CG3D_L23PyrRS/0/L23PyrRS" postSegmentId="73" postFractionAlong="0.421705807533" weight="1." delay="0.05 ms"/>
            <connectionWD id="1" preCellId="../CG3D_L23PyrRS/3/L23PyrRS" preSegmentId="147" preFractionAlong="0.139209976059" postCellId="../CG3D_L23PyrRS/0/L23PyrRS" postSegmentId="52" postFractionAlong="0.202847557145" weight="1." delay="0.05 ms"/>
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        </projection>
        <projection id="Proj2syn0_CG3D_L23PyrRS_CG3D_SupAxAx" presynapticPopulation="CG3D_L23PyrRS" postsynapticPopulation="CG3D_SupAxAx" synapse="Syn_NMDA_RSPyr_SupFS">
            <connectionWD id="0" preCellId="../CG3D_L23PyrRS/4/L23PyrRS" preSegmentId="142" preFractionAlong="0.394187784529" postCellId="../CG3D_SupAxAx/0/SupAxAx" postSegmentId="44" postFractionAlong="0.781614600038" weight="2.5" delay="0.05 ms"/>
            <connectionWD id="1" preCellId="../CG3D_L23PyrRS/9/L23PyrRS" preSegmentId="143" preFractionAlong="0.458787188565" postCellId="../CG3D_SupAxAx/0/SupAxAx" postSegmentId="41" postFractionAlong="0.935117913916" weight="2.5" delay="0.05 ms"/>
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        </projection>
        <projection id="Proj2syn1_CG3D_L23PyrRS_CG3D_SupAxAx" presynapticPopulation="CG3D_L23PyrRS" postsynapticPopulation="CG3D_SupAxAx" synapse="Syn_AMPA_SupPyr_SupFS">
            <connectionWD id="0" preCellId="../CG3D_L23PyrRS/4/L23PyrRS" preSegmentId="142" preFractionAlong="0.394187784529" postCellId="../CG3D_SupAxAx/0/SupAxAx" postSegmentId="44" postFractionAlong="0.781614600038" weight="1." delay="0.05 ms"/>
            <connectionWD id="1" preCellId="../CG3D_L23PyrRS/9/L23PyrRS" preSegmentId="143" preFractionAlong="0.458787188565" postCellId="../CG3D_SupAxAx/0/SupAxAx" postSegmentId="41" postFractionAlong="0.935117913916" weight="1." delay="0.05 ms"/>
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        </projection>
        <projection id="Proj3syn0_CG3D_L23PyrRS_CG3D_SupLTS" presynapticPopulation="CG3D_L23PyrRS" postsynapticPopulation="CG3D_SupLTS" synapse="Syn_NMDA_RSPyr_SupLTS">
            <connectionWD id="0" preCellId="../CG3D_L23PyrRS/12/L23PyrRS" preSegmentId="147" preFractionAlong="0.541269771575" postCellId="../CG3D_SupLTS/0/SupLTSInter" postSegmentId="10" postFractionAlong="0.724456708257" weight="2.5" delay="0.05 ms"/>
            <connectionWD id="1" preCellId="../CG3D_L23PyrRS/3/L23PyrRS" preSegmentId="143" preFractionAlong="0.771890607033" postCellId="../CG3D_SupLTS/0/SupLTSInter" postSegmentId="12" postFractionAlong="0.219279252561" weight="2.5" delay="0.05 ms"/>
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        </projection>
        <projection id="Proj3syn1_CG3D_L23PyrRS_CG3D_SupLTS" presynapticPopulation="CG3D_L23PyrRS" postsynapticPopulation="CG3D_SupLTS" synapse="Syn_AMPA_SupPyr_SupLTS">
            <connectionWD id="0" preCellId="../CG3D_L23PyrRS/12/L23PyrRS" preSegmentId="147" preFractionAlong="0.541269771575" postCellId="../CG3D_SupLTS/0/SupLTSInter" postSegmentId="10" postFractionAlong="0.724456708257" weight="1." delay="0.05 ms"/>
            <connectionWD id="1" preCellId="../CG3D_L23PyrRS/3/L23PyrRS" preSegmentId="143" preFractionAlong="0.771890607033" postCellId="../CG3D_SupLTS/0/SupLTSInter" postSegmentId="12" postFractionAlong="0.219279252561" weight="1." delay="0.05 ms"/>
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        </projection>
        <projection id="Proj4syn0_CG3D_L23PyrRS_CG3D_SupBask" presynapticPopulation="CG3D_L23PyrRS" postsynapticPopulation="CG3D_SupBask" synapse="Syn_NMDA_RSPyr_SupFS">
            <connectionWD id="0" preCellId="../CG3D_L23PyrRS/14/L23PyrRS" preSegmentId="146" preFractionAlong="0.620211704592" postCellId="../CG3D_SupBask/0/SupBasket" postSegmentId="60" postFractionAlong="0.054984420909" weight="2.5" delay="0.05 ms"/>
            <connectionWD id="1" preCellId="../CG3D_L23PyrRS/2/L23PyrRS" preSegmentId="147" preFractionAlong="0.814683018985" postCellId="../CG3D_SupBask/0/SupBasket" postSegmentId="91" postFractionAlong="0.460013197218" weight="2.5" delay="0.05 ms"/>
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        </projection>
        <projection id="Proj4syn1_CG3D_L23PyrRS_CG3D_SupBask" presynapticPopulation="CG3D_L23PyrRS" postsynapticPopulation="CG3D_SupBask" synapse="Syn_AMPA_SupPyr_SupFS">
            <connectionWD id="0" preCellId="../CG3D_L23PyrRS/14/L23PyrRS" preSegmentId="146" preFractionAlong="0.620211704592" postCellId="../CG3D_SupBask/0/SupBasket" postSegmentId="60" postFractionAlong="0.054984420909" weight="1." delay="0.05 ms"/>
            <connectionWD id="1" preCellId="../CG3D_L23PyrRS/2/L23PyrRS" preSegmentId="147" preFractionAlong="0.814683018985" postCellId="../CG3D_SupBask/0/SupBasket" postSegmentId="91" postFractionAlong="0.460013197218" weight="1." delay="0.05 ms"/>
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        </projection>
        <projection id="Proj5syn0_CG3D_SupAxAx_CG3D_L23PyrRS" presynapticPopulation="CG3D_SupAxAx" postsynapticPopulation="CG3D_L23PyrRS" synapse="Syn_GABAA_SupAxAx_SupPyr">
            <connectionWD id="0" preCellId="../CG3D_SupAxAx/0/SupAxAx" preSegmentId="117" preFractionAlong="0.154853582046" postCellId="../CG3D_L23PyrRS/0/L23PyrRS" postSegmentId="137" postFractionAlong="0.430388331053" weight="1." delay="0.05 ms"/>
            <connectionWD id="1" preCellId="../CG3D_SupAxAx/1/SupAxAx" preSegmentId="112" preFractionAlong="0.17153932097" postCellId="../CG3D_L23PyrRS/0/L23PyrRS" postSegmentId="137" postFractionAlong="0.442604991654" weight="1." delay="0.05 ms"/>
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        </projection>
        <projection id="Proj6syn0_CG3D_SupLTS_CG3D_L23PyrRS" presynapticPopulation="CG3D_SupLTS" postsynapticPopulation="CG3D_L23PyrRS" synapse="Syn_GABAA_SupLTS_SupPyr">
            <connectionWD id="0" preCellId="../CG3D_SupLTS/1/SupLTSInter" preSegmentId="113" preFractionAlong="0.186228904224" postCellId="../CG3D_L23PyrRS/0/L23PyrRS" postSegmentId="114" postFractionAlong="0.824911459271" weight="1." delay="0.05 ms"/>
            <connectionWD id="1" preCellId="../CG3D_SupLTS/1/SupLTSInter" preSegmentId="112" preFractionAlong="0.571496840753" postCellId="../CG3D_L23PyrRS/0/L23PyrRS" postSegmentId="68" postFractionAlong="0.533235697722" weight="1." delay="0.05 ms"/>
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        </projection>
        <projection id="Proj7syn0_CG3D_SupLTS_CG3D_SupAxAx" presynapticPopulation="CG3D_SupLTS" postsynapticPopulation="CG3D_SupAxAx" synapse="Syn_GABAA_SupLTS_FS">
            <connectionWD id="0" preCellId="../CG3D_SupLTS/0/SupLTSInter" preSegmentId="113" preFractionAlong="0.992972197116" postCellId="../CG3D_SupAxAx/0/SupAxAx" postSegmentId="25" postFractionAlong="0.467173172537" weight="1." delay="0.05 ms"/>
            <connectionWD id="1" preCellId="../CG3D_SupLTS/0/SupLTSInter" preSegmentId="117" preFractionAlong="0.301989036541" postCellId="../CG3D_SupAxAx/0/SupAxAx" postSegmentId="36" postFractionAlong="0.370423810006" weight="1." delay="0.05 ms"/>
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        </projection>
        <projection id="Proj8syn0_CG3D_SupLTS_CG3D_SupLTS" presynapticPopulation="CG3D_SupLTS" postsynapticPopulation="CG3D_SupLTS" synapse="Syn_GABAA_SupLTS_LTS">
            <connectionWD id="0" preCellId="../CG3D_SupLTS/1/SupLTSInter" preSegmentId="113" preFractionAlong="0.478623154849" postCellId="../CG3D_SupLTS/0/SupLTSInter" postSegmentId="52" postFractionAlong="0.714520768785" weight="1." delay="0.05 ms"/>
            <connectionWD id="1" preCellId="../CG3D_SupLTS/1/SupLTSInter" preSegmentId="116" preFractionAlong="0.149339265466" postCellId="../CG3D_SupLTS/0/SupLTSInter" postSegmentId="92" postFractionAlong="0.581333992335" weight="1." delay="0.05 ms"/>
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        </projection>
        <projection id="Proj10syn0_CG3D_SupLTS_CG3D_SupBask" presynapticPopulation="CG3D_SupLTS" postsynapticPopulation="CG3D_SupBask" synapse="Syn_GABAA_SupLTS_FS">
            <connectionWD id="0" preCellId="../CG3D_SupLTS/0/SupLTSInter" preSegmentId="116" preFractionAlong="0.249454946139" postCellId="../CG3D_SupBask/0/SupBasket" postSegmentId="99" postFractionAlong="0.515203487778" weight="1." delay="0.05 ms"/>
            <connectionWD id="1" preCellId="../CG3D_SupLTS/0/SupLTSInter" preSegmentId="112" preFractionAlong="0.49145300399" postCellId="../CG3D_SupBask/0/SupBasket" postSegmentId="36" postFractionAlong="0.276063853513" weight="1." delay="0.05 ms"/>
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        </projection>
        <projection id="Proj11syn0_CG3D_SupBask_CG3D_L23PyrRS" presynapticPopulation="CG3D_SupBask" postsynapticPopulation="CG3D_L23PyrRS" synapse="Syn_GABAA_SupBask_SupPyr">
            <connectionWD id="0" preCellId="../CG3D_SupBask/1/SupBasket" preSegmentId="112" preFractionAlong="0.00929160145551" postCellId="../CG3D_L23PyrRS/0/L23PyrRS" postSegmentId="6" postFractionAlong="0.166938250216" weight="1." delay="0.05 ms"/>
            <connectionWD id="1" preCellId="../CG3D_SupBask/1/SupBasket" preSegmentId="116" preFractionAlong="0.74618483692" postCellId="../CG3D_L23PyrRS/0/L23PyrRS" postSegmentId="10" postFractionAlong="0.905912861278" weight="1." delay="0.05 ms"/>
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        </projection>
        <projection id="Proj12syn0_CG3D_SupBask_CG3D_SupAxAx" presynapticPopulation="CG3D_SupBask" postsynapticPopulation="CG3D_SupAxAx" synapse="Syn_GABAA_SupBask_SupAxAx">
            <connectionWD id="0" preCellId="../CG3D_SupBask/0/SupBasket" preSegmentId="117" preFractionAlong="0.0212035066307" postCellId="../CG3D_SupAxAx/0/SupAxAx" postSegmentId="11" postFractionAlong="0.610879198537" weight="1." delay="0.05 ms"/>
            <connectionWD id="1" preCellId="../CG3D_SupBask/1/SupBasket" preSegmentId="113" preFractionAlong="0.176986158882" postCellId="../CG3D_SupAxAx/0/SupAxAx" postSegmentId="18" postFractionAlong="0.518266701808" weight="1." delay="0.05 ms"/>
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        </projection>
        <projection id="Proj13syn0_CG3D_SupBask_CG3D_SupLTS" presynapticPopulation="CG3D_SupBask" postsynapticPopulation="CG3D_SupLTS" synapse="Syn_GABAA_SupBask_SupLTS">
            <connectionWD id="0" preCellId="../CG3D_SupBask/0/SupBasket" preSegmentId="117" preFractionAlong="0.311138279202" postCellId="../CG3D_SupLTS/0/SupLTSInter" postSegmentId="95" postFractionAlong="0.670830281608" weight="1." delay="0.05 ms"/>
            <connectionWD id="1" preCellId="../CG3D_SupBask/1/SupBasket" preSegmentId="113" preFractionAlong="0.585560745573" postCellId="../CG3D_SupLTS/0/SupLTSInter" postSegmentId="88" postFractionAlong="0.736221869722" weight="1." delay="0.05 ms"/>
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        </projection>
        <projection id="Proj14syn0_CG3D_SupBask_CG3D_SupBask" presynapticPopulation="CG3D_SupBask" postsynapticPopulation="CG3D_SupBask" synapse="Syn_GABAA_SupBask_SupBask">
            <connectionWD id="0" preCellId="../CG3D_SupBask/1/SupBasket" preSegmentId="112" preFractionAlong="0.488133879112" postCellId="../CG3D_SupBask/0/SupBasket" postSegmentId="44" postFractionAlong="0.605661217064" weight="1." delay="0.05 ms"/>
            <connectionWD id="1" preCellId="../CG3D_SupBask/1/SupBasket" preSegmentId="117" preFractionAlong="0.599029254391" postCellId="../CG3D_SupBask/0/SupBasket" postSegmentId="35" postFractionAlong="0.287109796905" weight="1." delay="0.05 ms"/>
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        </projection>
        <inputList id="DepCurr_L23RS_TO_CG3D_L23PyrRS_0_0" population="CG3D_L23PyrRS" component="DepCurr_L23RS_TO_CG3D_L23PyrRS_Pulse0_Cell17">
            <input id="0" target="../CG3D_L23PyrRS/17/L23PyrRS" destination="synapses" segmentId="0" fractionAlong="0.500000"/>
        </inputList>
        <inputList id="DepCurr_L23RS_TO_CG3D_L23PyrRS_1_0" population="CG3D_L23PyrRS" component="DepCurr_L23RS_TO_CG3D_L23PyrRS_Pulse0_Cell15">
            <input id="0" target="../CG3D_L23PyrRS/15/L23PyrRS" destination="synapses" segmentId="0" fractionAlong="0.500000"/>
        </inputList>
        <inputList id="DepCurr_L23RS_TO_CG3D_L23PyrRS_2_0" population="CG3D_L23PyrRS" component="DepCurr_L23RS_TO_CG3D_L23PyrRS_Pulse0_Cell7">
            <input id="0" target="../CG3D_L23PyrRS/7/L23PyrRS" destination="synapses" segmentId="0" fractionAlong="0.500000"/>
        </inputList>
        <inputList id="DepCurr_L23RS_TO_CG3D_L23PyrRS_3_0" population="CG3D_L23PyrRS" component="DepCurr_L23RS_TO_CG3D_L23PyrRS_Pulse0_Cell8">
            <input id="0" target="../CG3D_L23PyrRS/8/L23PyrRS" destination="synapses" segmentId="0" fractionAlong="0.500000"/>
        </inputList>
        <inputList id="DepCurr_L23RS_TO_CG3D_L23PyrRS_4_0" population="CG3D_L23PyrRS" component="DepCurr_L23RS_TO_CG3D_L23PyrRS_Pulse0_Cell14">
            <input id="0" target="../CG3D_L23PyrRS/14/L23PyrRS" destination="synapses" segmentId="0" fractionAlong="0.500000"/>
        </inputList>
        <inputList id="DepCurr_L23RS_TO_CG3D_L23PyrRS_5_0" population="CG3D_L23PyrRS" component="DepCurr_L23RS_TO_CG3D_L23PyrRS_Pulse0_Cell4">
            <input id="0" target="../CG3D_L23PyrRS/4/L23PyrRS" destination="synapses" segmentId="0" fractionAlong="0.500000"/>
        </inputList>
        <inputList id="DepCurr_L23RS_TO_CG3D_L23PyrRS_6_0" population="CG3D_L23PyrRS" component="DepCurr_L23RS_TO_CG3D_L23PyrRS_Pulse0_Cell0">
            <input id="0" target="../CG3D_L23PyrRS/0/L23PyrRS" destination="synapses" segmentId="0" fractionAlong="0.500000"/>
        </inputList>
        <inputList id="DepCurr_L23RS_TO_CG3D_L23PyrRS_7_0" population="CG3D_L23PyrRS" component="DepCurr_L23RS_TO_CG3D_L23PyrRS_Pulse0_Cell1">
            <input id="0" target="../CG3D_L23PyrRS/1/L23PyrRS" destination="synapses" segmentId="0" fractionAlong="0.500000"/>
        </inputList>
        <inputList id="DepCurr_L23RS_TO_CG3D_L23PyrRS_8_0" population="CG3D_L23PyrRS" component="DepCurr_L23RS_TO_CG3D_L23PyrRS_Pulse0_Cell13">
            <input id="0" target="../CG3D_L23PyrRS/13/L23PyrRS" destination="synapses" segmentId="0" fractionAlong="0.500000"/>
        </inputList>
        <inputList id="DepCurr_L23RS_TO_CG3D_L23PyrRS_9_0" population="CG3D_L23PyrRS" component="DepCurr_L23RS_TO_CG3D_L23PyrRS_Pulse0_Cell19">
            <input id="0" target="../CG3D_L23PyrRS/19/L23PyrRS" destination="synapses" segmentId="0" fractionAlong="0.500000"/>
        </inputList>
        <inputList id="DepCurr_L23RS_TO_CG3D_L23PyrRS_10_0" population="CG3D_L23PyrRS" component="DepCurr_L23RS_TO_CG3D_L23PyrRS_Pulse0_Cell12">
            <input id="0" target="../CG3D_L23PyrRS/12/L23PyrRS" destination="synapses" segmentId="0" fractionAlong="0.500000"/>
        </inputList>
        <inputList id="DepCurr_L23RS_TO_CG3D_L23PyrRS_11_0" population="CG3D_L23PyrRS" component="DepCurr_L23RS_TO_CG3D_L23PyrRS_Pulse0_Cell3">
            <input id="0" target="../CG3D_L23PyrRS/3/L23PyrRS" destination="synapses" segmentId="0" fractionAlong="0.500000"/>
        </inputList>
        <inputList id="DepCurr_L23RS_TO_CG3D_L23PyrRS_12_0" population="CG3D_L23PyrRS" component="DepCurr_L23RS_TO_CG3D_L23PyrRS_Pulse0_Cell16">
            <input id="0" target="../CG3D_L23PyrRS/16/L23PyrRS" destination="synapses" segmentId="0" fractionAlong="0.500000"/>
        </inputList>
        <inputList id="DepCurr_L23RS_TO_CG3D_L23PyrRS_13_0" population="CG3D_L23PyrRS" component="DepCurr_L23RS_TO_CG3D_L23PyrRS_Pulse0_Cell5">
            <input id="0" target="../CG3D_L23PyrRS/5/L23PyrRS" destination="synapses" segmentId="0" fractionAlong="0.500000"/>
        </inputList>
        <inputList id="DepCurr_L23RS_TO_CG3D_L23PyrRS_14_0" population="CG3D_L23PyrRS" component="DepCurr_L23RS_TO_CG3D_L23PyrRS_Pulse0_Cell9">
            <input id="0" target="../CG3D_L23PyrRS/9/L23PyrRS" destination="synapses" segmentId="0" fractionAlong="0.500000"/>
        </inputList>
        <inputList id="DepCurr_L23RS_TO_CG3D_L23PyrRS_15_0" population="CG3D_L23PyrRS" component="DepCurr_L23RS_TO_CG3D_L23PyrRS_Pulse0_Cell11">
            <input id="0" target="../CG3D_L23PyrRS/11/L23PyrRS" destination="synapses" segmentId="0" fractionAlong="0.500000"/>
        </inputList>
        <inputList id="DepCurr_L23RS_TO_CG3D_L23PyrRS_16_0" population="CG3D_L23PyrRS" component="DepCurr_L23RS_TO_CG3D_L23PyrRS_Pulse0_Cell6">
            <input id="0" target="../CG3D_L23PyrRS/6/L23PyrRS" destination="synapses" segmentId="0" fractionAlong="0.500000"/>
        </inputList>
        <inputList id="DepCurr_L23RS_TO_CG3D_L23PyrRS_17_0" population="CG3D_L23PyrRS" component="DepCurr_L23RS_TO_CG3D_L23PyrRS_Pulse0_Cell10">
            <input id="0" target="../CG3D_L23PyrRS/10/L23PyrRS" destination="synapses" segmentId="0" fractionAlong="0.500000"/>
        </inputList>
        <inputList id="DepCurr_L23RS_TO_CG3D_L23PyrRS_18_0" population="CG3D_L23PyrRS" component="DepCurr_L23RS_TO_CG3D_L23PyrRS_Pulse0_Cell18">
            <input id="0" target="../CG3D_L23PyrRS/18/L23PyrRS" destination="synapses" segmentId="0" fractionAlong="0.500000"/>
        </inputList>
        <inputList id="DepCurr_L23RS_TO_CG3D_L23PyrRS_19_0" population="CG3D_L23PyrRS" component="DepCurr_L23RS_TO_CG3D_L23PyrRS_Pulse0_Cell2">
            <input id="0" target="../CG3D_L23PyrRS/2/L23PyrRS" destination="synapses" segmentId="0" fractionAlong="0.500000"/>
        </inputList>
        <inputList id="BackgroundL23RS_TO_CG3D_L23PyrRS_0_0" population="CG3D_L23PyrRS" component="BackgroundL23RS_TO_CG3D_L23PyrRS_PoiSyn0">
            <input id="0" target="../CG3D_L23PyrRS/18/L23PyrRS" destination="synapses" segmentId="61" fractionAlong="0.618211"/>
            <input id="1" target="../CG3D_L23PyrRS/18/L23PyrRS" destination="synapses" segmentId="132" fractionAlong="0.181323"/>
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        </inputList>
        <inputList id="EctopicStimL23RS_TO_CG3D_L23PyrRS_0_0" population="CG3D_L23PyrRS" component="EctopicStimL23RS_TO_CG3D_L23PyrRS_PoiSyn0">
            <input id="0" target="../CG3D_L23PyrRS/5/L23PyrRS" destination="synapses" segmentId="143" fractionAlong="0.500000"/>
            <input id="1" target="../CG3D_L23PyrRS/19/L23PyrRS" destination="synapses" segmentId="143" fractionAlong="0.500000"/>
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        </inputList>
    </network>
</neuroml>
