<Lems>

    <!--

        This LEMS file has been automatically generated using PyNeuroML v0.3.1 (libNeuroML v0.2.33)

     -->

    <!-- Specify which component to run -->
    <Target component="Simple"/>

    <!-- Include core NeuroML2 ComponentType definitions -->
    <Include file="Cells.xml"/>
    <Include file="Networks.xml"/>
    <Include file="Simulation.xml"/>

    <Include file="simplenet.nml"/>

    <Simulation id="Simple" length="1000ms" step="0.025ms" target="simplenet" seed="12345">  <!-- Note seed: ensures same random numbers used every run -->

        <Display id="DispPop__Pop0" title="Membrane potentials of cells in Pop0" timeScale="1ms" xmin="-100.0" xmax="1100.0" ymin="-90" ymax="50">
            <Line id="Pop0[0]: v" quantity="Pop0[0]/v" scale="1mV" color="#829850" timeScale="1ms"/>
            <Line id="Pop0[1]: v" quantity="Pop0[1]/v" scale="1mV" color="#548709" timeScale="1ms"/>
            <Line id="Pop0[2]: v" quantity="Pop0[2]/v" scale="1mV" color="#f684bf" timeScale="1ms"/>
            <Line id="Pop0[3]: v" quantity="Pop0[3]/v" scale="1mV" color="#3648c9" timeScale="1ms"/>
            <Line id="Pop0[4]: v" quantity="Pop0[4]/v" scale="1mV" color="#95fdec" timeScale="1ms"/>
        </Display>

        <Display id="DispPop__Pop1" title="Membrane potentials of cells in Pop1" timeScale="1ms" xmin="-100.0" xmax="1100.0" ymin="-90" ymax="50">
            <Line id="Pop1[0]: v" quantity="Pop1[0]/v" scale="1mV" color="#aadece" timeScale="1ms"/>
            <Line id="Pop1[1]: v" quantity="Pop1[1]/v" scale="1mV" color="#2d3420" timeScale="1ms"/>
            <Line id="Pop1[2]: v" quantity="Pop1[2]/v" scale="1mV" color="#0b2154" timeScale="1ms"/>
            <Line id="Pop1[3]: v" quantity="Pop1[3]/v" scale="1mV" color="#b7443e" timeScale="1ms"/>
            <Line id="Pop1[4]: v" quantity="Pop1[4]/v" scale="1mV" color="#bd5f4c" timeScale="1ms"/>
        </Display>

        <OutputFile id="Volts_file__Pop0" fileName="Simple.Pop0.v.dat">
            <OutputColumn id="v_Pop0_0__v" quantity="Pop0[0]/v"/>
            <OutputColumn id="v_Pop0_1__v" quantity="Pop0[1]/v"/>
            <OutputColumn id="v_Pop0_2__v" quantity="Pop0[2]/v"/>
            <OutputColumn id="v_Pop0_3__v" quantity="Pop0[3]/v"/>
            <OutputColumn id="v_Pop0_4__v" quantity="Pop0[4]/v"/>
        </OutputFile>

        <OutputFile id="Volts_file__Pop1" fileName="Simple.Pop1.v.dat">
            <OutputColumn id="v_Pop1_0__v" quantity="Pop1[0]/v"/>
            <OutputColumn id="v_Pop1_1__v" quantity="Pop1[1]/v"/>
            <OutputColumn id="v_Pop1_2__v" quantity="Pop1[2]/v"/>
            <OutputColumn id="v_Pop1_3__v" quantity="Pop1[3]/v"/>
            <OutputColumn id="v_Pop1_4__v" quantity="Pop1[4]/v"/>
        </OutputFile>

        <EventOutputFile id="Spikes_file__Pop0" fileName="Simple.Pop0.spikes" format="ID_TIME">
            <EventSelection id="0" select="Pop0[0]" eventPort="spike"/>
            <EventSelection id="1" select="Pop0[1]" eventPort="spike"/>
            <EventSelection id="2" select="Pop0[2]" eventPort="spike"/>
            <EventSelection id="3" select="Pop0[3]" eventPort="spike"/>
            <EventSelection id="4" select="Pop0[4]" eventPort="spike"/>
        </EventOutputFile>

        <EventOutputFile id="Spikes_file__Pop1" fileName="Simple.Pop1.spikes" format="ID_TIME">
            <EventSelection id="0" select="Pop1[0]" eventPort="spike"/>
            <EventSelection id="1" select="Pop1[1]" eventPort="spike"/>
            <EventSelection id="2" select="Pop1[2]" eventPort="spike"/>
            <EventSelection id="3" select="Pop1[3]" eventPort="spike"/>
            <EventSelection id="4" select="Pop1[4]" eventPort="spike"/>
        </EventOutputFile>

    </Simulation>

</Lems>
